OpenVSP model (file version 5), 39 components.
Geometry view with OpenVSP parameter names; values to 6 digits, angles in degrees, lengths in the model's unit.
Overall bounding box: X_Min=0 X_Len=1.424 Y_Min=-1.4 Y_Len=2.8 Z_Min=-0.015 Z_Len=1.17597

Wing "WingGeom"
  location (X Y Z) 0.46 0 0.853, rotation 0 3 0
  symmetric about XZ
  bounding box size 0.351781 2.8 0.0608471
  mass: Density=0 Shell_Flag=0 Mass_Area=0 Mass_Prior=0 PointMass=1.3 CGx=0.15469 CGy=0 CGz=0 Ixx=0 Iyy=0 Izz=0 Ixy=0 Ixz=0 Iyz=0
  totals: TotalSpan=2.8 TotalProjectedSpan=2.8 TotalChord=0.35 TotalArea=0.98 TotalAR=8 MAC=0.35
  root: chord 0.35, twist 0, NACA 4-series Camber=0.02 CamberLoc=0.4 ThickChord=0.12
  sections:
    n  Span  Root_Chord  Tip_Chord  Area  Sweep  Sweep_Location  Dihedral  Twist  Twist_Location  tip airfoil
    1  1.4   0.35        0.35       0.49  0      0               0         0      0.25            as above
  SS_Control "Ailerons": EtaStart=0.6 EtaEnd=0.9 Length_C_Start=0.25 Length_C_End=0.25 Length_Start=0.0875 Length_End=0.0875 LE_Flag=0 Surf_Type=2

Custom "Batteria_1"
  location (X Y Z) 0.42 0 0.798, rotation 0 0 90
  bounding box size 0.14 0.05 0.04
  mass: Density=0 Shell_Flag=0 Mass_Area=0 Mass_Prior=1 PointMass=0.973 CGx=0.025 CGy=0 CGz=0 Ixx=0 Iyy=0 Izz=0 Ixy=0 Ixz=0 Iyz=0
  Design: Height=0.04 Length=0.05 SquareFlag=0 Width=0.14
  custom script Box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

Custom "Batteria_2"
  location (X Y Z) 0.42 -0.05 0.798, rotation 0 0 90
  bounding box size 0.14 0.05 0.04
  mass: Density=0 Shell_Flag=0 Mass_Area=0 Mass_Prior=1 PointMass=0.973 CGx=0.0252 CGy=0 CGz=0 Ixx=0 Iyy=0 Izz=0 Ixy=0 Ixz=0 Iyz=0
  Design: Height=0.04 Length=0.05 SquareFlag=0 Width=0.14
  custom script Box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

Custom "Serbatoio"
  location (X Y Z) 0.045 0 0.835, rotation 0 0 0
  bounding box size 0.205 0.105 0.071
  mass: Density=0 Shell_Flag=0 Mass_Area=0 Mass_Prior=1 PointMass=1.18 CGx=0.1 CGy=0 CGz=0 Ixx=0 Iyy=0 Izz=0 Ixy=0 Ixz=0 Iyz=0
  Design: Height=0.071 Length=0.205 SquareFlag=0 Width=0.105
  custom script Box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

Fuselage "FuselageGeom"
  location (X Y Z) 0 0 0.833333, rotation 0 0 0
  bounding box size 1.40333 0.16 0.16
  mass: Density=0 Shell_Flag=0 Mass_Area=0 Mass_Prior=0 PointMass=0.984 CGx=0.455 CGy=0 CGz=0 Ixx=0 Iyy=0 Izz=0 Ixy=0 Ixz=0 Iyz=0
  Design: Length=1.4
  cross sections:
    n  XLocPercent  YLocPercent  ZLocPercent  shape
    0  0            0            0            point
    1  0.0571429    0            0            circle Circle_Diameter=0.16
    2  0.325        0            0            as above
    3  0.592857     0            0            as above
    4  0.65         0            0            circle Circle_Diameter=0.02
    5  0.75         0            0            as above
    6  1            0            0            as above
    7  1            0            0            point

Custom "Motore ant dx"
  location (X Y Z) 0.18 0.7 0.873, rotation 0 0 0
  bounding box size 0.05 0.03 0.03
  mass: Density=0 Shell_Flag=0 Mass_Area=0 Mass_Prior=1 PointMass=0.3 CGx=0.025 CGy=0 CGz=0 Ixx=0 Iyy=0 Izz=0 Ixy=0 Ixz=0 Iyz=0
  Design: Height=0.03 Length=0.05 SquareFlag=0 Width=0.03
  custom script Box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

Custom "Motore ant sx"
  location (X Y Z) 0.18 -0.7 0.873, rotation 0 0 0
  bounding box size 0.05 0.03 0.03
  mass: Density=0 Shell_Flag=0 Mass_Area=0 Mass_Prior=1 PointMass=0.3 CGx=0.025 CGy=0 CGz=0 Ixx=0 Iyy=0 Izz=0 Ixy=0 Ixz=0 Iyz=0
  Design: Height=0.03 Length=0.05 SquareFlag=0 Width=0.03
  custom script Box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

Custom "Motore post sx"
  location (X Y Z) 1.005 -0.3 0.833, rotation 0 0 0
  bounding box size 0.05 0.03 0.03
  mass: Density=0 Shell_Flag=0 Mass_Area=0 Mass_Prior=1 PointMass=0.3 CGx=0.025 CGy=0 CGz=0 Ixx=0 Iyy=0 Izz=0 Ixy=0 Ixz=0 Iyz=0
  Design: Height=0.03 Length=0.05 SquareFlag=0 Width=0.03
  custom script Box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

Custom "Motore post dx"
  location (X Y Z) 1.005 0.3 0.833, rotation 0 0 0
  bounding box size 0.05 0.03 0.03
  mass: Density=0 Shell_Flag=0 Mass_Area=0 Mass_Prior=1 PointMass=0.3 CGx=0.025 CGy=0 CGz=0 Ixx=0 Iyy=0 Izz=0 Ixy=0 Ixz=0 Iyz=0
  Design: Height=0.03 Length=0.05 SquareFlag=0 Width=0.03
  custom script Box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

Custom "Pompa"
  location (X Y Z) 0.25 0 0.795, rotation 0 0 0
  bounding box size 0.067 0.078 0.049
  mass: Density=0 Shell_Flag=0 Mass_Area=0 Mass_Prior=1 PointMass=0.213 CGx=0.0335 CGy=0 CGz=0 Ixx=0 Iyy=0 Izz=0 Ixy=0 Ixz=0 Iyz=0
  Design: Height=0.049 Length=0.067 SquareFlag=0 Width=0.078
  custom script Box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

Custom "Elettrovalvola"
  location (X Y Z) 0.185 0 0.783, rotation 0 0 0
  bounding box size 0.065 0.055 0.033
  mass: Density=0 Shell_Flag=0 Mass_Area=0 Mass_Prior=1 PointMass=0.218 CGx=0.0325 CGy=0 CGz=0 Ixx=0 Iyy=0 Izz=0 Ixy=0 Ixz=0 Iyz=0
  Design: Height=0.033 Length=0.065 SquareFlag=0 Width=0.055
  custom script Box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

Custom "CubeOrange"
  location (X Y Z) 0.62 0 0.883, rotation 0 0 0
  bounding box size 0.0945 0.0443 0.04
  mass: Density=0 Shell_Flag=0 Mass_Area=0 Mass_Prior=1 PointMass=0.072 CGx=0.04725 CGy=0 CGz=0 Ixx=0 Iyy=0 Izz=0 Ixy=0 Ixz=0 Iyz=0
  Design: Height=0.04 Length=0.0945 SquareFlag=0 Width=0.0443
  custom script Box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

Custom "ESC1"
  location (X Y Z) 0.46 -0.7 0.853, rotation 0 0 0
  bounding box size 0.069 0.039 0.02
  mass: Density=0 Shell_Flag=0 Mass_Area=0 Mass_Prior=1 PointMass=0.085 CGx=0.0345 CGy=0 CGz=0 Ixx=0 Iyy=0 Izz=0 Ixy=0 Ixz=0 Iyz=0
  Design: Height=0.02 Length=0.069 SquareFlag=0 Width=0.039
  custom script Box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

Custom "ESC2"
  location (X Y Z) 0.73 0.03 0.879, rotation 0 0 0
  bounding box size 0.069 0.039 0.02
  mass: Density=0 Shell_Flag=0 Mass_Area=0 Mass_Prior=1 PointMass=0.085 CGx=0.0345 CGy=0 CGz=0 Ixx=0 Iyy=0 Izz=0 Ixy=0 Ixz=0 Iyz=0
  Design: Height=0.02 Length=0.069 SquareFlag=0 Width=0.039
  custom script Box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

Custom "ESC3"
  location (X Y Z) 0.46 0.7 0.853, rotation 0 0 0
  bounding box size 0.069 0.039 0.02
  mass: Density=0 Shell_Flag=0 Mass_Area=0 Mass_Prior=1 PointMass=0.085 CGx=0.0345 CGy=0 CGz=0 Ixx=0 Iyy=0 Izz=0 Ixy=0 Ixz=0 Iyz=0
  Design: Height=0.02 Length=0.069 SquareFlag=0 Width=0.039
  custom script Box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

Custom "ESC4"
  location (X Y Z) 0.73 -0.03 0.879, rotation 0 0 0
  bounding box size 0.069 0.039 0.02
  mass: Density=0 Shell_Flag=0 Mass_Area=0 Mass_Prior=1 PointMass=0.085 CGx=0.0345 CGy=0 CGz=0 Ixx=0 Iyy=0 Izz=0 Ixy=0 Ixz=0 Iyz=0
  Design: Height=0.02 Length=0.069 SquareFlag=0 Width=0.039
  custom script Box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

Custom "TD SR18 Receiver"
  location (X Y Z) 0.81 -0.04 0.873, rotation 0 0 0
  bounding box size 0.047 0.026 0.014
  mass: Density=0 Shell_Flag=0 Mass_Area=0 Mass_Prior=1 PointMass=0.03 CGx=0.0235 CGy=0 CGz=0 Ixx=0 Iyy=0 Izz=0 Ixy=0 Ixz=0 Iyz=0
  Design: Height=0.014 Length=0.047 SquareFlag=0 Width=0.026
  custom script Box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

Custom "RFD 900X Telemetry"
  location (X Y Z) 0.065 0.01 0.888, rotation 0 0 0
  bounding box size 0.09 0.05 0.02
  mass: Density=0 Shell_Flag=0 Mass_Area=0 Mass_Prior=1 PointMass=0.015 CGx=0.045 CGy=0 CGz=0 Ixx=0 Iyy=0 Izz=0 Ixy=0 Ixz=0 Iyz=0
  Design: Height=0.02 Length=0.09 SquareFlag=0 Width=0.05
  custom script Box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

Hinge "HingeAntDx"
  location (X Y Z) 0.205 0.7 0.873, rotation 0 0 0
  Hinge: JointRotMax=360 JointRotMaxFlag=0 JointRotMin=-360 JointRotMinFlag=0 JointRotate=0 JointRotateFlag=1 JointTransMax=1000 JointTransMaxFlag=0 JointTransMin=-1000 JointTransMinFlag=0 JointTranslate=0 JointTranslateFlag=0 OrientRotFlag=0 PrimOffAbsRelFlag=1 PrimType=0 PrimULoc=0 PrimVecAbsRelFlag=1 PrimWLoc=0 PrimXOff=0 PrimXOffRel=0 PrimXVec=0 PrimXVecRel=0 PrimYOff=0 PrimYOffRel=0 PrimYVec=1 PrimYVecRel=1 PrimZOff=0 PrimZOffRel=0 PrimZVec=0 PrimZVecRel=0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

Propeller "PropAntDx", child of "HingeAntDx"
  location (X Y Z) 0.205 0.7 0.873, rotation 0 0 0; relative location 0 0 0, rotation 0 0 0
  bounding box size 0 0.3556 0.3556
  mass: Density=1 Shell_Flag=0 Mass_Area=1 Mass_Prior=1
  Design: Diameter=0.3556 NumBlade=2 Beta34=8.5 UseBeta34Flag=1 Feather=-5.94955 Rotate=0 Precone=0 ReverseFlag=1 FoldAngle=0 PropMode=2 AF=72.02 CLi=0 Chord=0.124453 Solidity=0.079229 ConstructXoC=0.5 FeatherAxisXoC=0.5 FeatherOffsetXoC=0
  cross sections:
    n  RadiusFrac  shape
    0  0.078       NACA 16-series Chord=0.0179857 IdealCl=0 ThickChord=0.0959
    1  1           NACA 16-series Chord=0.00046736 IdealCl=0 ThickChord=0
  Chord along r/R (PCHIP): 0.078: 0.101157, 0.104: 0.103071, 0.13: 0.108514, 0.156: 0.1167, 0.182: 0.126371, 0.208: 0.136186, 0.234: 0.145, 0.26: 0.151971, 0.285843: 0.157143, 0.3089: 0.160729, 0.3318: 0.1634, 0.354686: 0.165214, 0.377586: 0.166229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
  Twist along r/R (PCHIP): 0.078: 11.8396, 0.104: 19.0738, 0.13: 26.0294, 0.156: 31.7298, 0.182: 35.7034, 0.208: 37.84, 0.234: 38.1527, 0.26: 36.6118, 0.285843: 34.0632, 0.3089: 32.0319, 0.3318: 30.2195, 0.354686: 28.5846, 0.377586: 27.1047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
  Rake along r/R (PCHIP): 0.078: 0.0571, 0.104: 0.0584, 0.13: 0.0601143, 0.156: 0.0621, 0.182: 0.0642, 0.208: 0.0662714, 0.234: 0.0681714, 0.26: 0.0697429, 0.285843: 0.0708714, 0.3089: 0.0715286, 0.3318: 0.0718571, 0.354686: 0.0718714, 0.377586: 0.0716143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
  Sweep along r/R (PCHIP): 0.078: -0.181429, 0.104: -0.111057, 0.13: 0.0548571, 0.156: 0.300929, 0.182: 0.588257, 0.208: 0.845686, 0.234: 1.03597, 0.26: 1.12797, 0.285843: 1.14613, 0.3089: 1.15771, 0.3318: 1.16616, 0.354686: 1.17217, 0.377586: 1.17609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
  Thick along r/R (PCHIP): 0.078: 0.0959, 0.104: 0.1552, 0.13: 0.2189, 0.156: 0.2816, 0.182: 0.3377, 0.208: 0.3819, 0.234: 0.4086, 0.26: 0.4124, 0.285843: 0.4001, 0.3089: 0.3886, 0.3318: 0.3769, 0.354686: 0.3648, 0.377586: 0.3525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

Hinge "HingeAntSx"
  location (X Y Z) 0.205 -0.7 0.873, rotation 0 0 0
  Hinge: JointRotMax=360 JointRotMaxFlag=0 JointRotMin=-360 JointRotMinFlag=0 JointRotate=0 JointRotateFlag=1 JointTransMax=1000 JointTransMaxFlag=0 JointTransMin=-1000 JointTransMinFlag=0 JointTranslate=0 JointTranslateFlag=0 OrientRotFlag=0 PrimOffAbsRelFlag=1 PrimType=0 PrimULoc=0 PrimVecAbsRelFlag=1 PrimWLoc=0 PrimXOff=0 PrimXOffRel=0 PrimXVec=0 PrimXVecRel=0 PrimYOff=0 PrimYOffRel=0 PrimYVec=1 PrimYVecRel=1 PrimZOff=0 PrimZOffRel=0 PrimZVec=0 PrimZVecRel=0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

Propeller "PropAntSx", child of "HingeAntSx"
  location (X Y Z) 0.205 -0.7 0.873, rotation 0 0 0; relative location 0 0 0, rotation 0 0 0
  bounding box size 0 0.3556 0.3556
  mass: Density=1 Shell_Flag=0 Mass_Area=1 Mass_Prior=1
  Design: Diameter=0.3556 NumBlade=2 Beta34=8.5 UseBeta34Flag=1 Feather=-5.94955 Rotate=0 Precone=0 ReverseFlag=0 FoldAngle=0 PropMode=2 AF=72.02 CLi=0 Chord=0.124453 Solidity=0.079229 ConstructXoC=0.5 FeatherAxisXoC=0.5 FeatherOffsetXoC=0
  cross sections:
    n  RadiusFrac  shape
    0  0.078       NACA 16-series Chord=0.0179857 IdealCl=0 ThickChord=0.0959
    1  1           NACA 16-series Chord=0.00046736 IdealCl=0 ThickChord=0
  blade curves as in "PropAntDx"

Propeller "PropPostSx"
  location (X Y Z) 1.03 -0.3 0.833, rotation 0 90 0
  bounding box size 0.3556 0.3556 0
  mass: Density=1 Shell_Flag=0 Mass_Area=1 Mass_Prior=1
  Design: Diameter=0.3556 NumBlade=2 Beta34=8.5 UseBeta34Flag=1 Feather=-5.94955 Rotate=0 Precone=0 ReverseFlag=1 FoldAngle=0 PropMode=2 AF=72.02 CLi=0 Chord=0.124453 Solidity=0.079229 ConstructXoC=0.5 FeatherAxisXoC=0.5 FeatherOffsetXoC=0
  cross sections:
    n  RadiusFrac  shape
    0  0.078       NACA 16-series Chord=0.0179857 IdealCl=0 ThickChord=0.0959
    1  1           NACA 16-series Chord=0.00046736 IdealCl=0 ThickChord=0
  blade curves as in "PropAntDx"

Propeller "PropPostDx"
  location (X Y Z) 1.03 0.3 0.833, rotation 0 90 0
  bounding box size 0.3556 0.3556 0
  mass: Density=1 Shell_Flag=0 Mass_Area=1 Mass_Prior=1
  Design: Diameter=0.3556 NumBlade=2 Beta34=8.5 UseBeta34Flag=1 Feather=-5.94955 Rotate=0 Precone=0 ReverseFlag=0 FoldAngle=0 PropMode=2 AF=72.02 CLi=0 Chord=0.124453 Solidity=0.079229 ConstructXoC=0.5 FeatherAxisXoC=0.5 FeatherOffsetXoC=0
  cross sections:
    n  RadiusFrac  shape
    0  0.078       NACA 16-series Chord=0.0179857 IdealCl=0 ThickChord=0.0959
    1  1           NACA 16-series Chord=0.00046736 IdealCl=0 ThickChord=0
  blade curves as in "PropAntDx"

Custom "CubeID"
  location (X Y Z) 0.06 0 0.903, rotation 0 0 0
  bounding box size 0.025 0.014 0.004
  mass: Density=1 Shell_Flag=0 Mass_Area=1 Mass_Prior=1 PointMass=0.01 CGx=0.0125 CGy=0 CGz=0 Ixx=0 Iyy=0 Izz=0 Ixy=0 Ixz=0 Iyz=0
  Design: Height=0.004 Length=0.025 SquareFlag=0 Width=0.014
  custom script Box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

Custom "FrSky Archer"
  location (X Y Z) 0.79 0 0.898, rotation 0 0 0
  bounding box size 0.0485 0.033 0.017
  mass: Density=0 Shell_Flag=0 Mass_Area=0 Mass_Prior=1 PointMass=0.021 CGx=0.0245 CGy=0 CGz=0 Ixx=0 Iyy=0 Izz=0 Ixy=0 Ixz=0 Iyz=0
  Design: Height=0.017 Length=0.0485 SquareFlag=0 Width=0.033
  custom script Box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

Custom "Tensore di corrente"
  location (X Y Z) 0.73 0 0.773, rotation 0 0 0
  bounding box size 0.044 0.023 0.015
  mass: Density=0 Shell_Flag=0 Mass_Area=0 Mass_Prior=1 PointMass=0.022 CGx=0.022 CGy=0 CGz=0 Ixx=0 Iyy=0 Izz=0 Ixy=0 Ixz=0 Iyz=0
  Design: Height=0.015 Length=0.044 SquareFlag=0 Width=0.023
  custom script Box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

Custom "Mauch021 BEC FC"
  location (X Y Z) 0.73 0 0.823, rotation 0 0 0
  bounding box size 0.059 0.029 0.013
  mass: Density=1 Shell_Flag=0 Mass_Area=1 Mass_Prior=1 PointMass=0.026 CGx=0.0295 CGy=0 CGz=0 Ixx=0 Iyy=0 Izz=0 Ixy=0 Ixz=0 Iyz=0
  Design: Height=0.013 Length=0.059 SquareFlag=0 Width=0.029
  custom script Box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

Custom "SBEC"
  location (X Y Z) 0.57 0 0.843, rotation 0 0 0
  bounding box size 0.072 0.03 0.012
  mass: Density=0 Shell_Flag=0 Mass_Area=0 Mass_Prior=1 PointMass=0.05 CGx=0.036 CGy=0 CGz=0 Ixx=0 Iyy=0 Izz=0 Ixy=0 Ixz=0 Iyz=0
  Design: Height=0.012 Length=0.072 SquareFlag=0 Width=0.03
  custom script Box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

Custom "SBEC"
  location (X Y Z) 1.2 0 0.863, rotation 90 0 0
  bounding box size 0.072 0.012 0.03
  mass: Density=0 Shell_Flag=0 Mass_Area=0 Mass_Prior=1 PointMass=0.05 CGx=0.036 CGy=0 CGz=0 Ixx=0 Iyy=0 Izz=0 Ixy=0 Ixz=0 Iyz=0
  Design: Height=0.012 Length=0.072 SquareFlag=0 Width=0.03
  custom script Box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

Custom "GNSS Here4"
  location (X Y Z) 0.65 0 0.913, rotation 0 0 0
  bounding box size 0.068 0.068 0.016
  mass: Density=0 Shell_Flag=0 Mass_Area=0 Mass_Prior=1 PointMass=0.06 CGx=0.034 CGy=0 CGz=0 Ixx=0 Iyy=0 Izz=0 Ixy=0 Ixz=0 Iyz=0
  Design: Height=0.016 Length=0.068 SquareFlag=0 Width=0.068
  custom script Box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

Wing "Vtail"
  location (X Y Z) 1.149 0 0.833, rotation 0 0 0
  symmetric about XZ
  bounding box size 0.25 0.901067 0.343243
  mass: Density=0 Shell_Flag=0 Mass_Area=0 Mass_Prior=0 PointMass=0.242 CGx=0.10512 CGy=0 CGz=0 Ixx=0 Iyy=0 Izz=0 Ixy=0 Ixz=0 Iyz=0
  totals: TotalSpan=1.1 TotalProjectedSpan=0.901067 TotalChord=0.25 TotalArea=0.275 TotalAR=2.95244 MAC=0.25
  root: chord 0.25, twist 0, NACA 4-series Camber=0 CamberLoc=0.2 ThickChord=0.1
  sections:
    n  Span  Root_Chord  Tip_Chord  Area    Sweep  Sweep_Location  Dihedral  Twist  Twist_Location  tip airfoil
    1  0.55  0.25        0.25       0.1375  0      0               35        0      0.25            as above
  SS_Control "Ruddervator": EtaStart=0.25 EtaEnd=0.75 Length_C_Start=0.3 Length_C_End=0.3 Length_Start=0.075 Length_End=0.075 LE_Flag=0 Surf_Type=2

Custom "Paracadute"
  location (X Y Z) 0.26 0 0.858, rotation 0 -18 0
  bounding box size 0.239756 0.068 0.135746
  mass: Density=0 Shell_Flag=0 Mass_Area=0 Mass_Prior=1 PointMass=0.6 CGx=0.115 CGy=0 CGz=0 Ixx=0 Iyy=0 Izz=0 Ixy=0 Ixz=0 Iyz=0
  Design: Height=0.068 Length=0.23 SquareFlag=0 Width=0.068
  custom script Box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

Custom "Attuatore Tilt"
  location (X Y Z) 0 0 0, rotation 0 0 0
  bounding box size 0.042 0.041 0.021
  mass: Density=0 Shell_Flag=0 Mass_Area=0 Mass_Prior=1 PointMass=0.071 CGx=0.021 CGy=0 CGz=0 Ixx=0 Iyy=0 Izz=0 Ixy=0 Ixz=0 Iyz=0
  Design: Height=0.021 Length=0.042 SquareFlag=0 Width=0.041
  custom script Box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

Custom "Attuatore Alettone"
  location (X Y Z) 0 0 0, rotation 0 0 0
  bounding box size 0.04 0.039 0.02
  mass: Density=0 Shell_Flag=0 Mass_Area=0 Mass_Prior=1 PointMass=0.069 CGx=0.02 CGy=0 CGz=0 Ixx=0 Iyy=0 Izz=0 Ixy=0 Ixz=0 Iyz=0
  Design: Height=0.02 Length=0.04 SquareFlag=0 Width=0.039
  custom script Box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

Custom "Attuatore Ruddervator dx"
  location (X Y Z) 1.38 0 0.863, rotation 0 0 0
  bounding box size 0.044 0.042 0.03
  mass: Density=0 Shell_Flag=0 Mass_Area=0 Mass_Prior=1 PointMass=0.068 CGx=0.022 CGy=0 CGz=0 Ixx=0 Iyy=0 Izz=0 Ixy=0 Ixz=0 Iyz=0
  Design: Height=0.03 Length=0.044 SquareFlag=0 Width=0.042
  custom script Box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

Custom "Attuatore Ruddervator sx"
  location (X Y Z) 0 0 0, rotation 0 0 0
  bounding box size 0.044 0.042 0.03
  mass: Density=0 Shell_Flag=0 Mass_Area=0 Mass_Prior=1 PointMass=0.068 CGx=0.022 CGy=0 CGz=0 Ixx=0 Iyy=0 Izz=0 Ixy=0 Ixz=0 Iyz=0
  Design: Height=0.03 Length=0.044 SquareFlag=0 Width=0.042
  custom script Box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

Mesh "MeshGeom"
  location (X Y Z) 0 0 0, rotation 0 0 0

NGonMesh "MeshGeom_NGon"
  location (X Y Z) 0 0 0, rotation 0 0 0

VSPAERO settings (reference component "WingGeom"): Sref=0.98 bref=2.8 cref=0.35 Xcg=0.557 Ycg=0 Zcg=0.836 AlphaStart=-4 AlphaEnd=10 AlphaNpts=8 BetaStart=0 BetaEnd=0.6 BetaNpts=1 MachStart=0 MachEnd=0.058 MachNpts=1 ReCref=500000 Vinf=20 Rho=1.225
  control group "Ailerons": DeflectionAngle=0
  control group "Ruddervators": DeflectionAngle=0
